** -----------------`----------------------------------
** Material definition:
*MATERIAL, NAME=STEEL_4301
*ELASTIC
210000, 0.3333333333, 0
*DENSITY
7.85e-9
*PLASTIC
2000, 0, 0
3000, 1, 0
*SOLID SECTION, ELSET=SETALL, MATERIAL=STEEL_4301
** ---------------------------------------------------
** Analysis definition:
*TIME POINTS, NAME=t10, GENERATE
0, 1, 0.05
*STEP, AMPLITUDE=RAMP, UNSYMM=YES, NLGEOM=YES
*STATIC
0.2, 1, 1e-04, 0.2
** All displacements fixed at bottom:
*BOUNDARY, TYPE=DISPLACEMENT
NODES_B, 1, 3, 0
** Vertical displacement imposed at top:
*BOUNDARY, TYPE=DISPLACEMENT
NODES_T, 3, 3, +0.5
** ---------------------------------------------------
** Output request:
*EL FILE, OUTPUT=2D, TIME POINTS=t10
S,PEEQ
*NODE FILE, OUTPUT=2D
U
*NODE PRINT, TOTALS=ONLY, NSET=NODES_B
RF
*END STEP
